# PV film flisom

Dataset: openLCA process, unit process
Category: 2: Level 2
Geography: Switzerland
Time period: 1998-01-01 to 2014-12-31
Generated by: Niels Jungbluth
Published in: Jungbluth, N. et al. 2007
copyright: true

## General comment
Flisom approximation

## Technology
Production technology of thin film CIGS cells with thermal co-vaporization in vacuum.

## Geography
Flesom approximation

## Inputs
- electricity, medium voltage: 122.38 kWh; lognormal geomSd 1
- waste plastic, mixture: -0.86806 kg; lognormal geomSd 1
- cadmium sulfide, semiconductor-grade: 0.034037 kg; lognormal geomSd 1
- photovoltaic panel factory: 4e-6 Item(s); lognormal geomSd 1.72931
- tin: 0.01098 kg; lognormal geomSd 1
- tap water: 2.6665 kg; lognormal geomSd 1
- copper: 0.044956 kg; lognormal geomSd 1
- molybdenum: 0.01098 kg; lognormal geomSd 1
- nitrogen, liquid: 2.7778 kg; lognormal geomSd 1
- selenium: 0.01098 kg; lognormal geomSd 1
- argon, liquid: 0.0071952 kg; lognormal geomSd 1
- indium: 0.0054898 kg; lognormal geomSd 1
- acetone, liquid: 0.011765 kg; lognormal geomSd 1
- waste, from silicon wafer production, inorganic: -0.034411 kg; lognormal geomSd 1.10517
- urea, as N: 0.12536 kg; lognormal geomSd 1
- ammonia, liquid: 0.29333 kg; lognormal geomSd 1
- gallium, semiconductor-grade: 0.01098 kg; lognormal geomSd 1
- zinc: 0.012077 kg; lognormal geomSd 1
- ethylvinylacetate, foil: 0.86806 kg; lognormal geomSd 1
- laser machining, metal, with CO2-laser, 2000W power: 30 s

## Outputs
- Water: 7.735e-6 m3; lognormal geomSd 1.2214
- Cadmium: 2.1e-8 kg; lognormal geomSd 2.25332
- Water: 0.026665 kg; lognormal geomSd 1.2214
- PV film flisom: 1 m2

## Data treatment
This dataset has been extrapolated from year 2007 to the year of the calculation (2014). The uncertainty has been adjusted accordingly.

## Sampling procedure
Literature data based on producer information.
